<?xml version="1.0" encoding="UTF-8"?>
<neuroml xmlns="http://www.neuroml.org/schema/neuroml2"  xmlns:xs="http://www.w3.org/2001/XMLSchema" xmlns:xsi="http://www.w3.org/2001/XMLSchema-instance" xsi:schemaLocation="http://www.neuroml.org/schema/neuroml2 https://raw.github.com/NeuroML/NeuroML2/development/Schemas/NeuroML2/NeuroML_v2beta4.xsd" id="Simple_Golgi_Net_network">
      <include href="Simple_Golgi.cell.nml"/>
      <include href="Golgi_Na.channel.nml"/>
      <include href="Golgi_NaR.channel.nml"/>
      <include href="Golgi_NaP.channel.nml"/>
      <include href="Golgi_KA.channel.nml"/>
      <include href="Golgi_KM.channel.nml"/>
      <include href="Golgi_KV.channel.nml"/>
      <include href="Golgi_BK.channel.nml"/>
      <include href="Golgi_Ca_HVA.channel.nml"/>
      <include href="Golgi_Ca_LVA.channel.nml"/>
      <include href="Golgi_hcn1f.channel.nml"/>
      <include href="Golgi_hcn1s.channel.nml"/>
      <include href="Golgi_hcn2f.channel.nml"/>
      <include href="Golgi_hcn2s.channel.nml"/>
      <include href="LeakCond.channel.nml"/>
      <include href="Golgi_CALC.nml"/>
      <include href="Golgi_CALC_ca2.nml"/>
    <expTwoSynapse id="syn0" erev="0mV" gbase="1nS" tauDecay="10ms" tauRise="0.5ms"/>
    <poissonFiringSynapse id="poissonFiringSyn" synapse="syn0" averageRate="150 Hz" spikeTarget="./syn0"/>
    <network id="Simple_Golgi_Net_network">
        <population id="Pop0" component="Simple_Golgi" size="10"/>
        <population id="Pop1" component="Simple_Golgi" size="10"/>
        <projection id="Proj0" postsynapticPopulation="Pop1" presynapticPopulation="Pop0" synapse="syn0">
            <connection id="0" preCellId="../Pop0[0]" postCellId="../Pop1[0]"/>
            <connection id="1" preCellId="../Pop0[0]" postCellId="../Pop1[1]"/>
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        </projection>
        <explicitInput input="poissonFiringSyn" destination="synapses" target="Pop0[0]"/>
        <explicitInput input="poissonFiringSyn" destination="synapses" target="Pop0[1]"/>
        <explicitInput input="poissonFiringSyn" destination="synapses" target="Pop0[2]"/>
        <explicitInput input="poissonFiringSyn" destination="synapses" target="Pop0[3]"/>
        <explicitInput input="poissonFiringSyn" destination="synapses" target="Pop0[4]"/>
        <explicitInput input="poissonFiringSyn" destination="synapses" target="Pop0[5]"/>
        <explicitInput input="poissonFiringSyn" destination="synapses" target="Pop0[6]"/>
        <explicitInput input="poissonFiringSyn" destination="synapses" target="Pop0[7]"/>
        <explicitInput input="poissonFiringSyn" destination="synapses" target="Pop0[8]"/>
        <explicitInput input="poissonFiringSyn" destination="synapses" target="Pop0[9]"/>
    </network>
</neuroml>
